<?xml version="1.0" encoding="UTF-8"?>
<neuroml
  xmlns="http://www.neuroml.org/schema/neuroml2"
  xmlns:xs="http://www.w3.org/2001/XMLSchema"
  xmlns:xsi="http://www.w3.org/2001/XMLSchema-instance"
  xsi:schemaLocation="http://www.neuroml.org/schema/neuroml2
  https://raw.github.com/NeuroML/NeuroML2/development/Schemas/NeuroML2/NeuroML_v2beta5.xsd"
  id="NeuroML2_file_exported_from_NEURON">

  <notes>
  </notes>

  <include href="Spatio-Temporal-Cell.cell.nml"></include>

  <expTwoSynapse id="exc_syn_1conns" erev="0mV" gbase="25nS" tauDecay="10ms" tauRise="1ms"/>

  <pulseGenerator id="constant_hyperpolarizing_current" delay="0ms" duration="20s" amplitude="-70pA"/>
  <pulseGenerator id="transient_pulse_current" delay="700ms" duration="2000ms" amplitude="180pA"/>

  <iafCell id="generic_iaf_cell" reset="-70mV" C="0.4nF" thresh="-50mV" leakConductance="0.02uS" leakReversal="-70mV"/>

  <include href="Leak.channel.nml"/>
  <include href="k_slow.channel.nml"/>
  <include href="k_fast.channel.nml"/>
  <include href="ca_boyle.channel.nml"/>
  <include href="SingleCompMuscle.cell.nml"/>

  <network id="network" type="networkWithTemperature" temperature="34 degC">

      <population id="Pop_cADpyr" component="Spatio-Temporal-Cell" size="1" type="populationList">
          <property tag="region" value="L23"/>
          <instance id="0">
              <location x="100." y="0." z="0."/>
          </instance>
      </population>

      <population id="iaf_cell" component="generic_iaf_cell" type="populationList">
        <instance id="0">
          <location y="-50" x="0" z="0"/>
        </instance>
      </population>

      <population id="muscle" component="SingleCompMuscleCell" type="populationList">
          <instance id="0">
              <location y="0" x="0" z="0"/>
          </instance>
      </population>

      <projection id="N_M" postsynapticPopulation="Pop_cADpyr" presynapticPopulation="iaf_cell" synapse="exc_syn_1conns">
        <connection preCellId="../iaf_cell/0/generic_iaf_cell" postCellId="../Pop_cADpyr/0/Spatio-Temporal-Cell" id="0"/>
      </projection>

      <inputList id="hyp_input" population="Pop_cADpyr" component="constant_hyperpolarizing_current">
          <input id="0" target="../Pop_cADpyr/0/Spatio-Temporal-Cell" destination="synapses"/>
      </inputList>

      <inputList id="step_input" population="Pop_cADpyr" component="transient_pulse_current">
          <input id="0" target="../Pop_cADpyr/0/Spatio-Temporal-Cell" destination="synapses"/>
      </inputList>
  </network>
</neuroml>
